/BATCH
/NOPRINT
!
/COM ANSYS input file created by the MSC ANSYS input file translator (
/COM MSC/PATRAN ANSYS 15.1.055 ) on April     14, 2008 at 17:50:34.
!
/PREP7
!
!
/TITLE, ANSYS 5 job created on 14-Apr-08 at 17:20:40
!
N, 1015, -9.000001, -16.50000, -3.6
N, 1016, -7.5, -16.50000, -3.6
N, 1017, -6., -16.50000, -3.6
N, 1018, -4.5, -16.50000, -3.6
N, 1019, -3., -16.50000, -3.6
N, 1020, -1.5, -16.50000, -3.6
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N, 11144, 3.75, -0.75, 21.60000
!
/COM Defining Element Types
!
ET, 1,63, 0, 0, 0, 0, 0, 0
ET, 2, 4, 0, 0, 0, 0, 0, 0
/COM Properties for material "concrete"
/COM Date: 20-Aug-07           Time: 12:19:33
MP,EX,2,<cossan name="RV1" format="%10.4e" original="1" />
MP,PRXY,2,0.2
MP,DENS,2,2500.
/COM Properties for material "stairs"
/COM Date: 20-Aug-07           Time: 12:19:33
MP,EX,3,<cossan name="RV2" format="%10.4e" original="1" />
MP,PRXY,3,0.25
MP,DENS,3,2500.
/COM Properties for material "columns"
/COM Date: 20-Aug-07           Time: 12:19:33
MP,EX,4,<cossan name="RV3" format="%10.4e" original="1" />
MP,PRXY,4,0.25
MP,DENS,4,2500.
/COM Properties for material "floors"
/COM Date: 20-Aug-07           Time: 12:19:33
MP,EX,5,<cossan name="RV4" format="%10.4e" original="1" />
MP,PRXY,5,0.25
MP,DENS,5,2500.
!
/COM Turn off shape checking until all elements written
SHPP, OFF
!
!
/COM Element props and connectivity for Region:concrete
!
MAT,   2
TYPE,   1
REAL,1
R,1,0.3,0.,0.,0.,0.,0.
RMORE,0.,0.,0.,0.,0.,0.
EN, 883, 1015, 1016, 1038, 1037
EN, 884, 1016, 1017, 1039, 1038
EN, 885, 1017, 1018, 1040, 1039
EN, 886, 1018, 1019, 1041, 1040
EN, 887, 1019, 1020, 1042, 1041
EN, 888, 1020, 1021, 1043, 1042
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EN, 1291, 1640, 1641, 1485, 1469
!
/COM Element props and connectivity for Region:stairs
!
MAT,   3
TYPE,   1
REAL,2
R,2,0.16,0.,0.,0.,0.,0.
RMORE,0.,0.,0.,0.,0.,0.
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EN, 1955, 2655, 2656, 2661, 2660
!
/COM Element props and connectivity for Region:columns
!
MAT,   4
TYPE,   2
REAL,3
R,3,0.16,0.002133,0.002133,0.,0.,0.
RMORE,0.,0.,0.,0.,0.,0.
EN, 2060, 1533, 2813
EN, 2061, 2813, 2814
EN, 2062, 2814, 2815
EN, 2063, 2815, 2816
EN, 2064, 2820, 2821
EN, 2065, 2819, 2820
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EN, 9147, 1776, 1781
!
/COM Element props and connectivity for Region:floors
!
MAT,   5
TYPE,   1
REAL,4
R,4,0.2,0.,0.,0.,0.,0.
RMORE,0.,0.,0.,0.,0.,0.
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EN, 9043, 10855, 2698, 2699, 10862
!
/COM Element props and connectivity for Region:stair_walls
!
MAT,   3
TYPE,   1
REAL,5
R,5,0.2,0.,0.,0.,0.,0.
RMORE,0.,0.,0.,0.,0.,0.
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EN, 9299, 11144, 11001, 11002, 11057
!
/COM Turn shape checking back on and check shape
SHPP, ON
CHECK
!
FINISH
/SOLUTION
!
/COM Analysis Type
ANTYPE, STATIC
!
!
/STITLE, 1, Default
!
/COM THIS IS A DEFAULT SUBCASE.;-
BFDELE,ALL,ALL
DDELE,ALL,ALL
FDELE,ALL,ALL
HFDELE,ALL,ALL
NTDELE,ALL,ALL
SFEDELE,ALL,ALL,ALL
/COM Displacements for boundary condition "ground_fix"
D,1015,UX,0.,,1032,17
D,1389,UX,0.,,1406,17
D,1015,UY,0.,,1032,17
D,1389,UY,0.,,1406,17
D,1015,UZ,0.,,1032,17
D,1389,UZ,0.,,1406,17
/COM Forces for load "load"
F,3232,FX,100.,,3297,13

/COM Inertial loads for loadcase "gravity"
ACEL,0.,0.,10.
!
/COM Solution Parameters
!
NSUBST, 1

SOLVE

/POST1

PRNSOL,U,Y

FINISH
