!********************************************************
!
!
! 	DESIGN OF A SUSPENSION ARM
!
! 	MINIMIZATION OF TOTAL WEIGHT/VOLUME
!	SUBJECT TO FATIGUE LIFE CONSTRAINT
!
!
!********************************************************

/NOPR 			! Suppresses the expanded interpreted input data listing

!********************************************************
!
!
! 	DEFINITION OF VARIABLES
!
!
!********************************************************

! thicknesses
*dim,thk,array,7 	! creates array with 7 elements to store thicknesses
thk(1) 	=   1.0000   ! thickness of part 1 of suspension arm
thk(2) 	=   2.0000   ! thickness of part 2 of suspension arm
thk(3) 	=   3.0000   ! thickness of part 3 of suspension arm
thk(4) 	=   4.0000   ! thickness of part 4 of suspension arm
thk(5) 	=   5.0000   ! thickness of part 5 of suspension arm
thk(6) 	=   6.0000   ! thickness of part 6 of suspension arm
thk(7) 	=   7.0000   ! thickness of part 7 of suspension arm

! properties of the material
YoungsM = 200000	! Young's modulus
Poisson = 0.3		! Poisson's ratio

! loadings
*dim,forces_x,array,2
forces_x(1) 	= 769.23
forces_x(2) 	= -538.46
*dim,forces_y,array,2
forces_y(1) 	= 1538.46
forces_y(2) 	= -769.23

!********************************************************
!
!
! 	PREPROCESSING
!
!
!********************************************************

/PREP7

! Definition of Elements
ET,1,PLANE42, , , 3, , , , , 		! ID of element; type of element; 6 parameters dependent on particular element;
*DO,I,1,7
R,I,thk(I)             			! constants associated with element: ID of element; thickness of the beam
*ENDDO

! Definition of Material Properties
MP,EX,1,YoungsM 			! property to be set (Young's modulus); number of material; value of property
MP,PRXY,Poisson 			! property to be set (Poisson's ratio); number of material; value of property
MP,DENS,1,7.8E-6
MAT,1 					! turn on pointer to material 1

!==================================================
! Nodes
!==================================================
N, 1, 334.2536, 318.0343, 0.000000
N, 2, 334.2536, 328.0005, 0.000000
N, 3, 334.2536, 321.3564, 0.000000
N, 4, 334.2536, 324.6784, 0.000000
N, 5, 328.5062, 328.5477, 0.000000
N, 6, 331.3799, 328.2741, 0.000000
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N, 3980, 331.7751, 296.2856, 0.000000
!==================================================
! End of Nodes
!==================================================


!==================================================
! Part 1: Elements
!==================================================
TYPE,1 			! turn on type 1 elements
MAT,1			! turn on material no. 1
REAL,1 			! turn on constants associated with group 1
EN, 3138, 3536, 3546, 3420, 3413
EN, 3139, 3537, 3547, 3546, 3536
EN, 3140, 3538, 3548, 3547, 3537
EN, 3141, 3539, 3549, 3548, 3538
EN, 3142, 3540, 3550, 3549, 3539
EN, 3143, 3541, 3551, 3550, 3540
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EN, 3269, 3655, 3630, 3631, 3608
!==================================================
! Part 2: Elements
!==================================================
TYPE,1 			! turn on type 1 elements
MAT,1			! turn on material no. 1
REAL,2 			! turn on constants associated with group 2
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EN, 3137, 3508, 3509, 3507, 3503
!==================================================
! Part 3: Elements
!==================================================
TYPE,1 			! turn on type 1 elements
MAT,1			! turn on material no. 1
REAL,3 			! turn on constants associated with group 3
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EN, 3594, 3797, 3977, 3980, 3979
!==================================================
! Part 4: Elements
!==================================================
TYPE,1 			! turn on type 1 elements
MAT,1			! turn on material no. 1
REAL,4 			! turn on constants associated with group 4
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EN, 2857, 3208, 3207, 3211, 3209
!==================================================
! Part 5: Elements
!==================================================
TYPE,1 			! turn on type 1 elements
MAT,1			! turn on material no. 1
REAL,5 			! turn on constants associated with group 5
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EN, 161, 165, 166, 227, 228
!==================================================
! Part 6: Elements
!==================================================
TYPE,1 			! turn on type 1 elements
MAT,1			! turn on material no. 1
REAL,6 			! turn on constants associated with group 6
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EN, 2971, 3313, 3314, 3326, 3327
!==================================================
! Part 7: Elements
!==================================================
TYPE,1 			! turn on type 1 elements
MAT,1			! turn on material no. 1
REAL,7 			! turn on constants associated with group 7
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EN, 2629, 2932, 2933, 2974, 2961
!==================================================
! End of Elements
!==================================================

FINISH 			! finish pre-processor

!********************************************************
!
!
! 	SOLUTION
!
!
!********************************************************

/SOLU                   ! enter solution phase

! Define DOF constraints - support 1
D,2981,UY,0.,,2983,2
D,2984,UY,0.,,2996,1
D,2981,UZ,0. 				! node number; label of DOF to be contrained; value of contraint; (complex) value of contraint;
					! node number at end of list; node number increment; additional labels (6) with labels of DOFs to be constrained

! Define DOF constraints - support 2
D,3212,UX,0.,,3218,1
D,3212,UY,0.,,3218,1 			! node number; label of DOF to be contrained; value of contraint; (complex) value of contraint;
					! node number at end of list; node number increment; additional labels (6) with labels of DOFs to be constrained

!first set of loads
*DO,I,1,2
F,3512,FX,forces_x(I),,3524,1
F,3512,FY,forces_y(I),,3524,1
SOLVE
*ENDDO

!second set of loads
*DO,I,1,2
F,3512,FX,-forces_x(I),,3524,1
F,3512,FY,forces_y(I),,3524,1
SOLVE
*ENDDO

FINISH 					! finish solution

!********************************************************
!
!
! 	POST PROCESSING
!
!
!********************************************************

/POST1					!Initiates post-processing phase

!Fatigue Analysis

FTSIZE,3980,1,2				!Defines the fatigue data storage array; no. of locations, events and loadings

!Definition of S-N curve
FP,1 ,1e5   ,1e6   ,1e7 	!N values (positions 1 to 20; maximum of 6 entries per line)
FP,21,394.46,299.23,226.99	!S values (positions 21 to 40; maximum of 6 entries per line)

!*************************************************************************************
!Compute first set of loadings

!Store stresses
*DO,I,1,2
SET,I 					! turn on load set I
*DO,J,1,3980
FSNODE,J,1,I 				! define node; define event; define loading
*ENDDO
*ENDDO

FE,1,1e6,1.0,loading 1

!Perform fatigue calculations for a particular location or node
*DO,I,1,3980
FTCALC,,I 		!location, node
*ENDDO

!*************************************************************************************
!Compute second set of loadings

FE,1,-1

!Store stresses
*DO,I,3,4
SET,I 					! turn on load set I
*DO,J,1,3980
FSNODE,J,1,I-2 				! define node; define event; define loading
*ENDDO
*ENDDO


!Event repetitions and scale factor
!event number, no. of cycles, scale factor, title
FE,1,1e6,1.0,loading 2

!Perform fatigue calculations for a particular location or node
*DO,I,1,3980
FTCALC,,I 		!location, node
*ENDDO

FINISH 			! finish post-processor

/EOF 			! end of file
