*********************************************************************
** Abaqus/FROMNASTRAN Version 6.7-1
**
** reading bulk data from: test.bdf
**  creating ABAQUS input: test.inp
** writing diagnostics to: test.log
**
**  environment variables: fromnastran_wtmass_fixup <not present>
**                       : fromnastran_distribution <not present>
**                       : fromnastran_pbar_zero_reset <not present>
**                       : fromnastran_loadcases <not present>
**                       : fromnastran_surface_based_coupling <not present>
**                       : fromnastran_cquad4 <not present>
**                       : fromnastran_chexa <not present>
**                       : fromnastran_ctetra <not present>
**                       : fromnastran_cbar <not present>
**                       : fromnastran_beam_offset_coupling <not present>
**                       : fromnastran_beam_orientation_vector <not present>
**
** command line arguments: wtmass_fixup <not present>
**                       : distribution <not present>
**                       : pbar_zero_reset <not present, using default=1e-20
**                       : loadcases <not present>
**                       : surface_based_coupling <not present>
**                       : cquad4 <not present>
**                       : chexa <not present>
**                       : ctetra <not present>
**                       : cbar <not present>
**                       : beam_offset_coupling <not present>
**                       : beam_orientation_vector <not present>
**
** PARAM,WTMASS will NOT be used to adjust mass and density
** *DISTRIBUTION will be used for shell offsets, orientations, and thicknesses
** Zero PBAR/PBEAM cross sectional parameters will be reset to 1e-20
** SUBCASEs for SOL 101 and 108 will be General STEPs
** Rigid links will be modeled using non-surface-based constraints
** Beam orientations will use a third node on the element connectivity
** Beam offsets will be modeled using rigid couplings and extra nodes
**
** --------------------------------
** NASTRAN Case Control entities processed:
**      keyword   number
** ------------   ------
**   BEGIN BULK        1
** DISPLACEMENT        1
**         LOAD        1
**          SPC        1
**      SUBCASE        1
** --------------------------------
** NASTRAN Bulk Data processed:
**      keyword   number
** ------------   ------
**         CBAR      384
**       CQUAD4     7977
**      ENDDATA        1
**        FORCE        6
**         GRID     8628
**         LOAD        1
**         MAT1        4
**         PBAR        1
**       PSHELL        4
**         SPC1        1
**       SPCADD        1
**
** ---------------------------------------------------
** ---- *NODE ----------------------------------------
** ---------------------------------------------------
**
** following nodes were defined in the global coordinate system
**
*SYSTEM
**
*NODE, SYSTEM=R
    1015,         -9.,       -16.5,        -3.6
    1016,        -7.5,       -16.5,        -3.6
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**
** ---------------------------------------------------
** ---- *MATERIAL ------------------------------------
** ---------------------------------------------------
**
** material data from MAT1 with MID = 1
**
*MATERIAL, NAME=MAT_MID_1
*ELASTIC
 1.0000e+00, 0.2
*DENSITY
2500.,
**
** material data from MAT1 with MID = 2
**
*MATERIAL, NAME=MAT_MID_2
*ELASTIC
 1.0000e+00, 0.25
*DENSITY
2500.,
**
** material data from MAT1 with MID = 3
**
*MATERIAL, NAME=MAT_MID_3
*ELASTIC
 1.0000e+00, 0.25
*DENSITY
2500.,
**
** material data from MAT1 with MID = 4
**
*MATERIAL, NAME=MAT_MID_4
*ELASTIC
 1.0000e+00, 0.25
*DENSITY
2500.,
**
** ---------------------------------------------------
** ---- BEAM elements --------------------------------
** ---------------------------------------------------
**
** nodes created for defining beam orientations
**
*SYSTEM
*NODE
   20001,        -6.5,        -15.,          0.
   20002,        -6.5,        -15.,         0.9
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**
** following elements refer to a PBAR entry with PID = 3 and MID = 3
**
*BEAM GENERAL SECTION, SECTION=GENERAL, ELSET=ES_PID_BAR_3,
 DENSITY=2500.
** A, I11, I12, I22, J / blank line / E, G, ALPHA
** (Zero area and/or inertia was reset to 1e-20)
0.16, 0.00213333, 0., 0.00213333, 1e-20

5e+07, 2e+07
*SECTION POINTS
0.2,0.2,  -0.2,0.2,  -0.2,-0.2,  0.2,-0.2
**
*ELEMENT, TYPE=B31, ELSET=ES_PID_BAR_3
2060,   1533, 2813, 20001
2061,   2813, 2814, 20002
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**
** elset ALL_B31_BAR contains 384 elements in 1 elsets
*ELSET, ELSET=ALL_B31_BAR
ES_PID_BAR_3,
**
** ---------------------------------------------------
** --- SHELL elements (isotropic, non-directional) ---
** ---------------------------------------------------
**
** this SHELL SECTION comes from PSHELL entries with MID = 1
**
*SHELL SECTION, ELSET=PSHELL_MID_1,
 MATERIAL=MAT_MID_1,
 SHELL THICKNESS=SHELL_THICKNESS_DIST
0.3,
**
*ELEMENT, TYPE=S4, ELSET=PSHELL_MID_1
883, 1015, 1016, 1038, 1037
884, 1016, 1017, 1039, 1038
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**
** this SHELL SECTION comes from PSHELL entries with MID = 2
**
*SHELL SECTION, ELSET=PSHELL_MID_2,
 MATERIAL=MAT_MID_2,
 SHELL THICKNESS=SHELL_THICKNESS_DIST
0.16,
**
*ELEMENT, TYPE=S4, ELSET=PSHELL_MID_2
1292, 1642, 1643, 1648, 1647
1293, 1643, 1644, 1649, 1648
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**
** this SHELL SECTION comes from PSHELL entries with MID = 4
**
*SHELL SECTION, ELSET=PSHELL_MID_4,
 MATERIAL=MAT_MID_4,
 SHELL THICKNESS=SHELL_THICKNESS_DIST
0.2,
**
*ELEMENT, TYPE=S4, ELSET=PSHELL_MID_4
2396, 3232, 3233, 3246, 3245
2397, 3233, 3234, 3247, 3246
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**
** elset ALL_SHELL_ISO contains 7977 elements in 3 elsets
*ELSET, ELSET=ALL_SHELL_ISO
PSHELL_MID_1,
PSHELL_MID_2,
PSHELL_MID_4,
**
** ---------------------------------------------------
** --- DISTRIBUTIONs for shell element thicknesses ---
** ---------------------------------------------------
**
*DISTRIBUTION TABLE, NAME=SHELL_THICKNESS_DIST_TABLE
LENGTH,
**
*DISTRIBUTION, LOCATION=ELEMENT,
 NAME=SHELL_THICKNESS_DIST,
 TABLE=SHELL_THICKNESS_DIST_TABLE
 , 1.
**
** QUAD4 element thicknesses
883, 0.3
884, 0.3
885, 0.3
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9299, 0.2
**
** elset ALL_MASSIVE_ELEMENTS contains all 8361 elements that can have mass
*ELSET, ELSET=ALL_MASSIVE_ELEMENTS
ALL_SHELL_ISO,
ALL_B31_BAR,
** ---------------------------------------------------
** ------ STEP data for SUBCASE 1
** ---------------------------------------------------

*STEP
*STATIC
*NODE PRINT
U,
*BOUNDARY, OP=NEW
    1015, 1,3, 0.
    1032, 1,3, 0.
    1389, 1,3, 0.
    1406, 1,3, 0.
*CLOAD, OP=NEW
    3232, 1, 100.
    3245, 1, 100.
    3258, 1, 100.
    3271, 1, 100.
    3284, 1, 100.
    3297, 1, 100.
*END STEP
